units lj
atom_style bond
boundary p p p
timestep 0.001

read_data make_bubble.atoms

# solution
mass 1 1.0
# hydrophobic group
mass 2 1.0
# wall
mass 3 1.0

pair_style lj/cut 3.0
pair_coeff 1 1 1.0 1.0 3.0
pair_coeff 2 2 1.0 1.0 3.0
pair_coeff 3 3 1.0 1.0 3.0
pair_coeff 1 2 1.0 1.0 1.2
pair_coeff 1 3 1.0 1.0 3.0
pair_coeff 2 3 1.0 1.0 1.2

bond_style fene
bond_coeff 1 30.0 1.5 1.5 1.0

neighbor 0.3 bin
neigh_modify every 20 delay 0 check no

# Make a gruop ID named g-atoms
group g-atoms type 1 2
# Gravity and NVT only on atoms with atom type 1 and 2
fix 1 g-atoms nvt temp 0.7 0.7 0.1
fix 2 g-atoms gravity 0.01 vector 0.0 0.0 -1

dump id all custom 2500 make_bubble.lammpstrj id type x y z vx vy vz

thermo 500
run 100000
